# -*- coding: utf-8 -*-
import Sofa.Core

class SofaRuntime(object):
        class PluginManager(object):
                loadedPlugins = ["SofaPython3"]

def Settings(plugins=[], repositoryPaths=[]):
        self = Sofa.Core.Node("Settings")

        if not isinstance(plugins, list):
                Sofa.msg_error("MainHeader", "'plugins' expected to be a list, got "+str(type(plugins)))
                return node

        if "SofaMiscCollision" not in plugins:
                plugins.append("SofaMiscCollision")

        if "SofaPython3" not in plugins:
                plugins.append("SofaPython3")

        plugin = self.addChild("Plugins")
        for name in plugins:
                plugin.addObject('RequiredPlugin', name=name, printLog=False)

        i=0
        for repository in repositoryPaths:
                self.addObject('AddResourceRepository', name="AddResourceRepository"+str(i), path=repository)
                i+=1

        self.addObject('OglSceneFrame', style="Arrows", alignment="TopRight")

        return self

def Scene(root, gravity=[0.0,-9.81,0.0],
          dt=0.01, plugins=[], repositoryPaths=[]):
        def addDefaultSolver():
                root.addObject("EulerImplicitSolver")
                return root

        def addContactHeader():
                root.addObject("EulerImplicitSolver")
                return root

        def addModelling():
                root.addChild("Modelling")
                return root

        def addSimulation():
                self = root.addChild("Simulation")
                self.addObject('RequiredPlugin', pluginName='SofaImplicitOdeSolver')
                self.addObject("EulerImplicitSolver")
                self.addObject("CGLinearSolver")
                return root

        def addSettings(plugins=plugins, repositoryPaths=repositoryPaths):
                root.addChild(Settings(plugins=plugins, repositoryPaths=repositoryPaths))
                return root

        root.gravity.value = gravity
        root.dt.value = dt
        root.addSettings = addSettings
        root.addSolver = addDefaultSolver
        root.addContact = addContactHeader
        root.addModelling = addModelling
        root.addSimulation = addSimulation
        return root

def createScene(root):
        import os
        scene = Scene(root)

        scene.addSettings(repositoryPaths=[os.getcwd()])
        scene.addModelling()
        scene.addSimulation()

        scene.Simulation.addChild(scene.Modelling)
